*HEADING
3D HALFSPACE, 97x97x10 elements, 73x73 load elements of 80 km
**
**          DEFINE THE NODES OF THE HALFSPACE
**
*NODE,NSET=N1
1,   -10000.E3,-10000.E3,   0.0
*NODE,NSET=N13
13,   -2920.E3,-10000.E3,   0.0
*NODE,NSET=N86
86,    2920.E3,-10000.E3,   0.0
*NODE,NSET=N98
98,   10000.E3,-10000.E3,   0.0
*NODE,NSET=N1201
1201,-10000.E3, -2920.E3,   0.0
*NODE,NSET=N1213
1213, -2920.E3, -2920.E3,   0.0
*NODE,NSET=N1286
1286,  2920.E3, -2920.E3,   0.0
*NODE,NSET=N1298
1298, 10000.E3, -2920.E3,   0.0
*NODE,NSET=N8501
8501,-10000.E3,  2920.E3,   0.0
*NODE,NSET=N8513
8513, -2920.E3,  2920.E3,   0.0
*NODE,NSET=N8586
8586,  2920.E3,  2920.E3,   0.0
*NODE,NSET=N8598
8598, 10000.E3,  2920.E3,   0.0
*NODE,NSET=N9701
9701,-10000.E3, 10000.E3,   0.0
*NODE,NSET=N9713
9713, -2920.E3, 10000.E3,   0.0
*NODE,NSET=N9786
9786,  2920.E3, 10000.E3,   0.0
*NODE,NSET=N9798
9798, 10000.E3, 10000.E3,   0.0
*NFILL,BIAS=1.4550,NSET=LX1
N1,N13,12,1
*NFILL,BIAS=1.4550,NSET=LX2
N1201,N1213,12,1
*NFILL,BIAS=1.4550,NSET=LX3
N8501,N8513,12,1
*NFILL,BIAS=1.4550,NSET=LX4
N9701,N9713,12,1
*NGEN,NSET=CX1
13,86,1
*NGEN,NSET=CX2
1213,1286,1
*NGEN,NSET=CX3
8513,8586,1
*NGEN,NSET=CX4
9713,9786,1
*NFILL,BIAS=0.6873,NSET=UX1
N86,N98,12,1
*NFILL,BIAS=0.6873,NSET=UX2
N1286,N1298,12,1
*NFILL,BIAS=0.6873,NSET=UX3
N8586,N8598,12,1
*NFILL,BIAS=0.6873,NSET=UX4
N9786,N9798,12,1
*NSET,NSET=X1
LX1,CX1,UX1
*NSET,NSET=X2
LX2,CX2,UX2
*NSET,NSET=X3
LX3,CX3,UX3
*NSET,NSET=X4
LX4,CX4,UX4
*NFILL,BIAS=1.4550,NSET=LY
X1,X2,12,100
*NFILL,NSET=CY
X2,X3,73,100
*NFILL,BIAS=0.6873,NSET=UY
X3,X4,12,100
*NSET,NSET=UZPLANE
LY,CY,UY
*NCOPY,OLD SET=UZPLANE,CHANGE NUMBER=10000,SHIFT,NEW SET=Z1
0.,0.,-30.E3
0.,0.,0.,0.,0.,1.,0.
*NCOPY,OLD SET=UZPLANE,CHANGE NUMBER=20000,SHIFT,NEW SET=Z2
0.,0.,-60.E3
0.,0.,0.,0.,0.,1.,0.
*NCOPY,OLD SET=UZPLANE,CHANGE NUMBER=30000,SHIFT,NEW SET=Z3
0.,0.,-120.E3
0.,0.,0.,0.,0.,1.,0.
*NCOPY,OLD SET=UZPLANE,CHANGE NUMBER=40000,SHIFT,NEW SET=Z4
0.,0.,-170.E3
0.,0.,0.,0.,0.,1.,0.
*NCOPY,OLD SET=UZPLANE,CHANGE NUMBER=50000,SHIFT,NEW SET=Z5
0.,0.,-230.E3
0.,0.,0.,0.,0.,1.,0.
*NCOPY,OLD SET=UZPLANE,CHANGE NUMBER=60000,SHIFT,NEW SET=Z6
0.,0.,-400.E3
0.,0.,0.,0.,0.,1.,0.
*NCOPY,OLD SET=UZPLANE,CHANGE NUMBER=70000,SHIFT,NEW SET=Z7
0.,0.,-670.E3
0.,0.,0.,0.,0.,1.,0.
*NCOPY,OLD SET=UZPLANE,CHANGE NUMBER=80000,SHIFT,NEW SET=Z8
0.,0.,-1171.E3
0.,0.,0.,0.,0.,1.,0.
*NCOPY,OLD SET=UZPLANE,CHANGE NUMBER=90000,SHIFT,NEW SET=Z9
0.,0.,-4171.E3
0.,0.,0.,0.,0.,1.,0.
*NCOPY,OLD SET=UZPLANE,CHANGE NUMBER=100000,SHIFT,NEW SET=Z10
0.,0.,-10000.E3
0.,0.,0.,0.,0.,1.,0.
**    DEFINE THE WALLS AROUND
*NSET,NSET=XNEG,GENERATE
1,       9701,100
10001,  19701,100
20001,  29701,100
30001,  39701,100
40001,  49701,100
50001,  59701,100
60001,  69701,100
70001,  79701,100
80001,  89701,100
90001,  99701,100
100001,109701,100
*NSET,NSET=XPOS,GENERATE
98,      9798,100
10098,  19798,100
20098,  29798,100
30098,  39798,100
40098,  49798,100
50098,  59798,100
60098,  69798,100
70098,  79798,100
80098,  89798,100
90098,  99798,100
100098,109798,100
*NSET,NSET=YNEG,GENERATE
1,         98,1
10001,  10098,1
20001,  20098,1
30001,  30098,1
40001,  40098,1
50001,  50098,1
60001,  60098,1
70001,  70098,1
80001,  80098,1
90001,  90098,1
100001,100098,1
*NSET,NSET=YPOS,GENERATE
9701,    9798,1
19701,  19798,1
29701,  29798,1
39701,  39798,1
49701,  49798,1
59701,  59798,1
69701,  69798,1
79701,  79798,1
89701,  89798,1
99701,  99798,1
109701,109798,1
**
**  ELEMENT DEFINITION
**
** 1. homogeneous model/edge elements/shared/young crust elements
**
*ELEMENT,TYPE=C3D8H
1,      10001, 10002, 10102, 10101,     1,     2,   102,   101
50001, 60001,60002,60102,60101, 50001, 50002, 50102, 50101
60001,70001,70002,70102,70101,60001,60002,60102,60101
70001,80001,80002,80102,80101,70001,70002,70102,70101
80001,90001,90002,90102,90101,80001,80002,80102,80101
90001,100001,100002,100102,100101,90001,90002,90102,90101
*ELGEN
1,    97,1,1, 97,100,100
** ocean
*INCLUDE, INPUT=surface.el
*ELCOPY, OLD SET=CR1, NEW SET=CR2,
SHIFT NODES=10000, ELEMENT SHIFT=10000
*ELCOPY, OLD SET=CR1, NEW SET=MA1,
SHIFT NODES=20000, ELEMENT SHIFT=20000
*ELCOPY, OLD SET=CR1, NEW SET=MA2,
SHIFT NODES=30000, ELEMENT SHIFT=30000
*ELCOPY, OLD SET=CR1, NEW SET=MA3,
SHIFT NODES=40000, ELEMENT SHIFT=40000
**
*ELGEN, ELSET=MA4
50001,97,1,1, 97,100,100
*ELGEN, ELSET=CO1
60001,97,1,1, 97,100,100
*ELGEN, ELSET=CO2
70001,97,1,1, 97,100,100
*ELGEN, ELSET=CO3
80001,97,1,1, 97,100,100
*ELGEN, ELSET=CO4
90001,97,1,1, 97,100,100
**
**  BOUYANCY F = -FOUNDATION*U2
**  FOUNDATION = g*density contrast
**  g from gravity.xls
**  face 2 is the top, face 1 is the bottom
**
*FOUNDATION
CR1,   F2, 10046.052
CR1,   F1,  372.076
CR2,   F1,  1674.342
MA1, F1,  558.114
MA2, F1,  744.152
MA3, F1,  558.114
MA4, F1,  7255.482
CO1,    F1, 744.152
CO2,    F1, 744.152
CO3,    F1, 744.152
**               DEFINE MATERIAL PROPERTIES
**
*MATERIAL,NAME=MATCR1
*DENSITY
2700.00
*ELASTIC
4.0E+10,0.22
*MATERIAL,NAME=MATCR2
*DENSITY
2800.00
*ELASTIC
120.0E+9,0.24
*MATERIAL,NAME=MATMA1
*DENSITY
3250.00
*ELASTIC
170.0E+9,0.26
*CREEP, LAW=STRAIN
3.3333E-25, 1, 0
*MATERIAL,NAME=MATMA2
*DENSITY
3400.00
*ELASTIC
170.0E+9,0.26
*CREEP, LAW=STRAIN
3.3333E-25, 1, 0
*MATERIAL,NAME=MATMA3
*DENSITY
3600.00
*ELASTIC
170.0E+9,0.26
*CREEP, LAW=STRAIN
3.3333E-25, 1, 0
*MATERIAL,NAME=MATMA4
*DENSITY
3750.00
*ELASTIC
170.0E+9,0.26
*CREEP, LAW=STRAIN
3.3333E-25, 1, 0
*MATERIAL,NAME=MATCO1
*DENSITY
5700.00
*ELASTIC
204.0E+9,0.29
*CREEP, LAW=STRAIN
3.3333E-25, 1, 0
*MATERIAL,NAME=MATCO2
*DENSITY
5900.00
*ELASTIC
204.0E+9,0.29
*CREEP, LAW=STRAIN
3.3333E-25, 1, 0
*MATERIAL,NAME=MATCO3
*DENSITY
6100.00
*ELASTIC
204.0E+9,0.29
*CREEP, LAW=STRAIN
3.3333E-25, 1, 0
*MATERIAL,NAME=MATCO4
*DENSITY
6300.00
*ELASTIC
204.0E+9,0.29
*CREEP, LAW=STRAIN
3.3333E-25, 1, 0
**
**               ASSIGN MATERIAL PROPERTIES to ELEMENTS
**
** 1. homogeneous
*SOLID SECTION,ELSET=CR1,MATERIAL=MATCR1
*SOLID SECTION,ELSET=CR2,MATERIAL=MATCR2
*SOLID SECTION,ELSET=MA1,MATERIAL=MATMA1
*SOLID SECTION,ELSET=MA2,MATERIAL=MATMA2
*SOLID SECTION,ELSET=MA3,MATERIAL=MATMA3
*SOLID SECTION,ELSET=MA4,MATERIAL=MATMA4
*SOLID SECTION,ELSET=CO1,MATERIAL=MATCO1
*SOLID SECTION,ELSET=CO2,MATERIAL=MATCO2
*SOLID SECTION,ELSET=CO3,MATERIAL=MATCO3
*SOLID SECTION,ELSET=CO4,MATERIAL=MATCO4
**
*BOUNDARY
XNEG,1,2
XPOS,1,2
YNEG,1,2
YPOS,1,2
Z10,1,3
**
**                         HISTORY DATA
**                    STEP  0 (5 times characteristic time)
*STEP, INC=200, AMPLITUDE=STEP
*VISCO, CETOL=1E-1
3D6, 1.35D14,3.1558D7
*DLOAD, OP=NEW
*INCLUDE, INPUT=load_nominal
*OUTPUT, DIAGNOSTICS=NO
*OUTPUT, FIELD, FREQUENCY=0
*OUTPUT, HISTORY, FREQUENCY=0
*NODE PRINT,FREQ=100,NSET=UZPLANE
COOR1, COOR2, U1, U2, U3
*END STEP

**                    STEP  1
*STEP, INC=200, AMPLITUDE=STEP
*VISCO, CETOL=1E-1
3D9,  1.35D14,3.1526D7
*DLOAD, OP=NEW
*OUTPUT, DIAGNOSTICS=NO
*OUTPUT, FIELD, FREQUENCY=0
*OUTPUT, HISTORY, FREQUENCY=0
*NODE PRINT,FREQ=100,NSET=UZPLANE
COOR1, COOR2, U1, U2, U3
*END STEP

**                    STEP  2
*STEP, INC=200, AMPLITUDE=STEP
*VISCO, CETOL=1E-1
3D9,  1.35D14,3.1526D7
*DLOAD, OP=NEW
*OUTPUT, DIAGNOSTICS=NO
*OUTPUT, FIELD, FREQUENCY=0
*OUTPUT, HISTORY, FREQUENCY=0
*NODE PRINT,FREQ=100,NSET=UZPLANE
COOR1, COOR2, U1, U2, U3
*END STEP

**                    STEP  3
*STEP, INC=200, AMPLITUDE=STEP
*VISCO, CETOL=1E-1
3D9,  1.35D14,3.1526D7
*DLOAD, OP=NEW
*OUTPUT, DIAGNOSTICS=NO
*OUTPUT, FIELD, FREQUENCY=0
*OUTPUT, HISTORY, FREQUENCY=0
*NODE PRINT,FREQ=100,NSET=UZPLANE
COOR1, COOR2, U1, U2, U3
*END STEP

**                    STEP  4
*STEP, INC=200, AMPLITUDE=STEP
*VISCO, CETOL=1E-1
3D9,  1.35D14,3.1526D7
*DLOAD, OP=NEW
*OUTPUT, DIAGNOSTICS=NO
*OUTPUT, FIELD, FREQUENCY=0
*OUTPUT, HISTORY, FREQUENCY=0
*NODE PRINT,FREQ=100,NSET=UZPLANE
COOR1, COOR2, U1, U2, U3
*END STEP

**                    STEP  5
*STEP, INC=200, AMPLITUDE=STEP
*VISCO, CETOL=1E-1
3D9,  1.35D14,3.1526D7
*DLOAD, OP=NEW
*OUTPUT, DIAGNOSTICS=NO
*OUTPUT, FIELD, FREQUENCY=0
*OUTPUT, HISTORY, FREQUENCY=0
*NODE PRINT,FREQ=100,NSET=UZPLANE
COOR1, COOR2, U1, U2, U3
*END STEP

**                    STEP  6
*STEP, INC=200, AMPLITUDE=STEP
*VISCO, CETOL=1E-1
3D9,  1.35D14,3.1526D7
*DLOAD, OP=NEW
*OUTPUT, DIAGNOSTICS=NO
*OUTPUT, FIELD, FREQUENCY=0
*OUTPUT, HISTORY, FREQUENCY=0
*NODE PRINT,FREQ=100,NSET=UZPLANE
COOR1, COOR2, U1, U2, U3
*END STEP

**                    STEP  7
*STEP, INC=200, AMPLITUDE=STEP
*VISCO, CETOL=1E-1
3D9,  1.35D14,3.1526D7
*DLOAD, OP=NEW
*OUTPUT, DIAGNOSTICS=NO
*OUTPUT, FIELD, FREQUENCY=0
*OUTPUT, HISTORY, FREQUENCY=0
*NODE PRINT,FREQ=100,NSET=UZPLANE
COOR1, COOR2, U1, U2, U3
*END STEP

**                    STEP  8
*STEP, INC=200, AMPLITUDE=STEP
*VISCO, CETOL=1E-1
3D9,  1.35D14,3.1526D7
*DLOAD, OP=NEW
*OUTPUT, DIAGNOSTICS=NO
*OUTPUT, FIELD, FREQUENCY=0
*OUTPUT, HISTORY, FREQUENCY=0
*NODE PRINT,FREQ=100,NSET=UZPLANE
COOR1, COOR2, U1, U2, U3
*END STEP

**                    STEP  9
*STEP, INC=200, AMPLITUDE=STEP
*VISCO, CETOL=1E-1
3D9,  1.35D14,3.1526D7
*DLOAD, OP=NEW
*OUTPUT, DIAGNOSTICS=NO
*OUTPUT, FIELD, FREQUENCY=0
*OUTPUT, HISTORY, FREQUENCY=0
*NODE PRINT,FREQ=100,NSET=UZPLANE
COOR1, COOR2, U1, U2, U3
*END STEP

**                    STEP  10
*STEP, INC=200, AMPLITUDE=STEP
*VISCO, CETOL=1E-1
3D9,  1.35D14,3.1526D7
*DLOAD, OP=NEW
*OUTPUT, DIAGNOSTICS=NO
*OUTPUT, FIELD, FREQUENCY=0
*OUTPUT, HISTORY, FREQUENCY=0
*NODE PRINT,FREQ=100,NSET=UZPLANE
COOR1, COOR2, U1, U2, U3
*END STEP
